units UNITS
boundary p p p
atom_style sphere
dimension 2

lattice sq 0.01
region box block 0 10 0 10 0 10
create_box 2 box
create_atoms 1 box

set	       type 1 mass 1

pair_style table linear NPOINTS
pair_coeff * * FILE KEYWORD RCUT

pair_write 1 1 PWPOINTS r RMIN RMAX PWFIL KEYWORD
